## Exercise 1
# a)
y_1(x_1, x_2) := 2 - 2/3*x_1 - x_2
db_1(x_1) := y_1(x_1, x_2) == 0 solve, x_2 → 2 - 2*x_1/3
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# b)
w_1 := transpose([-2/3, -1])
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nv_1 := transpose([2 - 3, db_1(2) - db_1(3)]) → [-1; 2/3]
w_1*nv_1 = 0
# ===========
# c)
dr_1(x_1, x_2) :=
    1 if y_1(x_1, x_2) > 0
    0 otherwise
# [component: inputs dr_1]
# Red: c1 ~ y(x1,x2) > 0
# Purple: c2 ~ y(x1,x2) <= 0
## Exercise 2
y_2(x_1, x_2) := 3 + 3*x_1 - x_2
y_3(x_1, x_2) := 1 + 1/10*x_1 - 1/4*x_2
db_2(x_1) := y_2(x_1, x_2) == 0 solve, x_2 → 3*x_1 + 3
db_3(x_1) := y_3(x_1, x_2) == 0 solve, x_2 → 2*x_1/5 + 4
# a)
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# ra = { (x1, x2) | y1(x1, x2) > 0 and y2(x1, x2) > 0 }
# rb = { (x1, x2) | y1(x1, x2) <= 0 and y3(x1, x2) > 0 }
# rc = { (x1, x2) | y2(x1, x2) <= 0 and y3(x1, x2) <= 0 }
dr_2(x_1, x_2) :=
    3 if y_1(x_1, x_2) > 0 and y_2(x_1, x_2) > 0
    2 if y_1(x_1, x_2) ≤ 0 and y_3(x_1, x_2) > 0
    1 if y_2(x_1, x_2) ≤ 0 and y_3(x_1, x_2) ≤ 0
    0 otherwise
# [component: inputs dr_2]
# Red:  ra ~ y1(x1, x2) > 0 and y2(x1, x2) > 0
# Green: rb ~ y1(x1, x2) <= 0 and y3(x1, x2) > 0
# Blue:  rc ~ y2(x1, x2) <= 0 and y3(x1, x2) <= 0
# Purple: ambiguous region
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# b)
dr_3(x_1, x_2) :=
    3 if (y_1(x_1, x_2) > y_2(x_1, x_2)) and (y_1(x_1, x_2) > y_3(x_1, x_2))
    2 if (y_2(x_1, x_2) > y_1(x_1, x_2)) and (y_2(x_1, x_2) > y_3(x_1, x_2))
    1 if (y_3(x_1, x_2) > y_1(x_1, x_2)) and (y_3(x_1, x_2) > y_2(x_1, x_2))
# [component: inputs dr_3]
# Red:  ra ~ y1 > y2 and y1 > y3
# Green: rb ~ y2 > y1 and y2 > y3
# Purple: rc ~ y3 > y1 and y3 > y2
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