f(x_1, x_2) := ln(x_1^2 + 2*x_2^2 - 2*x_1*x_2 - 2*x_2 + 2)
d_x1(x_1, x_2) := d/dx_1(f(x_1, x_2)) → (2*x_1 - 2*x_2)/(x_1^2 - 2*x_1*x_2 + 2*x_2^2 - 2*x_2 + 2)
d_x2(x_1, x_2) := d/dx_2(f(x_1, x_2)) → -(2*x_1 - 4*x_2 + 2)/(x_1^2 - 2*x_1*x_2 + 2*x_2^2 - 2*x_2 + 2)
[1, 2; 3, 4]*[2, 2; 3, 3] = [8, 8; 18, 18]
p_init := [-5; -5]
gamma := 0.5
alpha := 0.9
3*[1, 2; 3, 4] = [3, 6; 9, 12]
gd(p, iter) :=
    p if iter == 0
    if iter > 0
        x ← p[0] - gamma*d_x1(p[0], p[1])
        y ← p[1] - gamma*d_x2(p[0], p[1])
        gd([x; y], iter - 1)
gdm(p, iter, m) :=
    p if iter == 0
    if iter > 0
        m[0] ← alpha*m[0] - gamma*d_x1(p[0], p[1])
        m[1] ← alpha*m[1] - gamma*d_x2(p[0], p[1])
        p_prime ← p + m
        gdm(p_prime, iter - 1, m)
[4, 5]*[1, 2; 3, 4] = [19, 28]
mkp(p_init, iter) :=
    p ← gd(p_init, iter)
    [p[0]; p[1]; f(p[0], p[1])]
[1, 2; 3, 4]*[4; 5] = [14; 32]
mkpm(p_init, iter) :=
    p ← gdm(p_init, iter, [0; 0])
    [p[0]; p[1]; f(p[0], p[1])]
ps(i, iter) :=
    j ← 0
    for k ∈ 0, 1 .. iter
        vec[j] ← mkp(p_init, j)[i]
        j ← j + 1
    transpose(vec)
psm(i, iter) :=
    j ← 0
    for k ∈ 0, 1 .. iter
        vec[j] ← mkpm(p_init, j)[i]
        j ← j + 1
    transpose(vec)
points := [ps(0, 100); ps(1, 100); ps(2, 100)]
points_m := [psm(0, 100); psm(1, 100); psm(2, 100)]
sigmoid(y) := 1/(1 + e^(-y))
err(t, o) := t*ln(o) - (1 - t)*ln(o)
# [component: inputs f, points, points_m]
pd_err := d/derr(err) → 1
d/dy(sigmoid(y)) → e^(-y)/(e^(-y) + 1)^2
d/do(err(t, o)) → t/o + (t - 1)/o
pd_o(t, y_4) := t/sigmoid(y_4) + (t - 1)/sigmoid(y_4) → (t - 1)*(e^(-y_4) + 1) + t*(e^(-y_4) + 1)
pd_y4(t, y_3, w_0) := pd_o(t, y_3*w_0)*(e^(-y_3*w_0)/(e^(-y_3*w_0) + 1)^2) → e^(-w_0*y_3)*(t*(e^(-w_0*y_3) + 1) + (e^(-w_0*y_3) + 1)*(t - 1))/(e^(-w_0*y_3) + 1)^2
pd_y3(t, y_2, w_0) := pd_y4(t, max(0, y_2), w_0)*w_0
pd_relU(x) :=
    1 if x > 0
    0 if x < 0
pd_y2(t, y_0, y_1, w_0) := pd_y3(t, y_0 + y_1, w_0)*pd_relU(y_0 + y_1)
pd_y0(t, x_1, w_1, x_2, w_2, w_0) := pd_y2(t, x_1*w_1, x_2*w_2, w_0)
pd_y1(t, x_1, w_1, x_2, w_2, w_0) := pd_y2(t, x_1*w_1, x_2*w_2, w_0)
pd_w0(t, y_3, w_0) := pd_y4(t, y_3, w_0)*y_3
pd_w1(t, x_1, w_1, x_2, w_2, w_0) := pd_y0(t, x_1, w_1, x_2, w_2, w_0)*x_1
pd_w2(t, x_1, w_1, x_2, w_2, w_0) := pd_y0(t, x_1, w_1, x_2, w_2, w_0)*x_2
w_0i := 0.5
w_1i := 0.5
w_2i := 0.5
x_1t := 1
x_2t := 2
t_t := 1
w_1g := pd_w1(t_t, x_1t, w_1i, x_2t, w_2i, w_0i) = 0.160411
w_2g := pd_w2(t_t, x_1t, w_1i, x_2t, w_2i, w_0i) = 0.320821
y_0g := pd_y0(t_t, x_1t, w_1i, x_2t, w_2i, w_0i) = 0.160411
d/dx((t_tt - x)^2) → 2*x - 2*t_tt
y_1g := pd_y1(t_t, x_1t, w_1i, x_2t, w_2i, w_0i) = 0.160411
y_2g := pd_y2(t_t, x_1t*w_1i, x_2t*w_2i, w_0i) = 0.160411
y_3g := pd_y3(t_t, x_1t*w_1i + x_2t*w_2i, w_0i) = 0.160411
w_0g := pd_w0(t_t, max(0, x_1t*w_1i + x_2t*w_2i), w_0i) = 0.481232
y_4g := pd_y4(t_t, max(0, x_1t*w_1i + x_2t*w_2i), w_0i) = 0.320821
o_g := pd_o(t_t, max(0, x_1t*w_1i + x_2t*w_2i)*w_0i) = 1.47237
