conv2d(X, k) :=
    k_d ← [rows(k); cols(k)]
    X_d ← [rows(X); cols(X)]
    row ← 0
    for i ∈ 0, 1 .. X_d[0] - k_d[0]
        col ← 0
        for j ∈ 0, 1 .. X_d[1] - k_d[1]
            M[row, col] ← 0
            for h ∈ 0, 1 .. k_d[0] - 1
                for l ∈ 0, 1 .. k_d[1] - 1
                    M[row, col] ← M[row, col] + X[row + h, col + l]*k[h, l]
            col ← col + 1
        row ← row + 1
    M
X_1 := [0, 0, 0, 0, 0, 0; 0, 1, 0, 1, 1, 0; 0, 1, 0, 1, 1, 0; 0, 1, 0, 0, 0, 0; 0, 1, 0, 0, 0, 0]
k_1 := [-1, 1]
conv2d(X_1, k_1) = [0, 0, 0, 0, 0; 1, -1, 1, 0, -1; 1, -1, 1, 0, -1; 1, -1, 0, 0, 0; 1, -1, 0, 0, 0]
